*HEADING
** Demo jacket + topside wireframe (B31 beams)
** Generated for visualization/testing only
*PREPRINT, ECHO=NO, MODEL=NO, HISTORY=NO, CONTACT=NO
**
*PART, NAME=PLATFORM
*NODE
1, -10.000, -10.000, -130.000
2, 10.000, -10.000, -130.000
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*ELEMENT, TYPE=B31, ELSET=EALL
1, 1, 5
2, 5, 9
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** Section & material (simple)
*MATERIAL, NAME=STEEL
*ELASTIC
210000., 0.3
*BEAM SECTION, SECTION=CIRC, MATERIAL=STEEL, ELSET=EALL
0.300
0., 0., -1.
*END PART
**
*ASSEMBLY, NAME=ASSEMBLY
*INSTANCE, NAME=PLATFORM-1, PART=PLATFORM
*END INSTANCE
*END ASSEMBLY
** End of file
